// SBML level 2 version 4

model mTOR_Signalling_Model()
  // mTOR Signalling Network Model

  // Compartments:
  compartment cytosol = 1; cytosol is "Cytosol";

  // Species:
  species mTORC1 in cytosol = 250;
  species pmTORC1 in cytosol = 0;
  species mTORC2 in cytosol = 200;
  species pmTORC2 in cytosol = 0;
  species DEPTOR in cytosol = 350;
  species pDEPTOR in cytosol = 0;
  species IR in cytosol = 50;
  species pIR in cytosol = 0;
  species IRS in cytosol = 100;
  species pIRS in cytosol = 0;
  species Akt in cytosol = 100;
  species pAkt in cytosol = 0;

  // Parameters:
  Km1 = 95;
  V1 = 1;

  // Reactions:
  reaction1: IR => pIR; compartment*Henri_Michaelis_Menten__irreversible(IR, Km1, V1);
end
