// SBML level 3 version 1

model NF1_Neurofibroma()
  // Neurofibroma Pathogenesis due to NF1 Loss

  // Compartments:
  compartment cytosol = 1;

  // Species:
  species hiPSC_WT in cytosol = 100/cytosol;
  species hiPSC_Het in cytosol = 100/cytosol;
  species hiPSC_Null in cytosol = 100/cytosol;
  species SLC_WT in cytosol = 0;
  species SLC_Het in cytosol = 0;
  species SLC_Null in cytosol = 0;
  species SOX10 in cytosol = 0;

  // Parameters:
  k_diff_WT = 0.1;
  k_diff_Het = 0.05;
  k_diff_Null = 0.2;
  k_tumor = 0.05;

  // Reactions:
  Differentiation_WT: hiPSC_WT => SLC_WT; k_diff_WT;
  Differentiation_Het: hiPSC_Het => SLC_Het; k_diff_Het;
  Differentiation_Null: hiPSC_Null => SLC_Null; k_diff_Null;
  TumorFormation_Null: SLC_Null => SOX10; k_tumor;
end
