<neuroml xmlns="http://www.neuroml.org/schema/neuroml2"  xmlns:xs="http://www.w3.org/2001/XMLSchema" xmlns:xsi="http://www.w3.org/2001/XMLSchema-instance" xsi:schemaLocation="http://www.neuroml.org/schema/neuroml2 https://raw.github.com/NeuroML/NeuroML2/development/Schemas/NeuroML2/NeuroML_v2.3.1.xsd" id="IzSingleNeuron">
    <izhikevich2007Cell id="izh2007RS0" C="100pF" v0="-60mV" k="0.7nS_per_mV" vr="-60mV" vt="-40mV" vpeak="35mV" a="0.03per_ms" b="-2nS" c="-50.0mV" d="100pA"/>
    <pulseGenerator id="pulsegen_izh2007RS0" delay="0ms" duration="1000ms" amplitude="0.07 nA"/>
    <network id="IzNet">
        <population id="IzhPop0" component="izh2007RS0" size="1"/>
        <explicitInput target="IzhPop0[0]" input="pulsegen_izh2007RS0"/>
    </network>
</neuroml>
