// SBML level 2 version 4
// dcterms:bibliographicCitation: http://identifiers.org/pubmed/24523664
// dcterms:bibliographicCitation: http://identifiers.org/doi/10.1371/journal.pbio.1001788

function Constant_flux__irreversible(v)
  v;
end
Constant_flux__irreversible is "Constant flux (irreversible)";

function function_for_cdk1a_degradation_by_apc_2(APC_C_active, Cyclin_B1_Cdk1_complex_phosphorylated, k_dest)
  k_dest*APC_C_active*Cyclin_B1_Cdk1_complex_phosphorylated;
end

function function_for_apc_activation_1(APC_C_active, APC_C_total, Plx1_active, ec50_apc, k_apc_on, n_apc)
  k_apc_on/(1 + (ec50_apc/Plx1_active)^n_apc)*(APC_C_total - APC_C_active);
end

function function_for_cdk1a_degradation_by_apc_1(APC_C_active, Cyclin_B1_Cdk1_complex_unphosphorylated, k_dest)
  k_dest*APC_C_active*Cyclin_B1_Cdk1_complex_unphosphorylated;
end

function function_for_plx1_activation_1(Cyclin_B1_Cdk1_complex_phosphorylated, Plx1_active, Plx1_total, ec50_plx, k_plxon, n_plx)
  k_plxon/(1 + (ec50_plx/Cyclin_B1_Cdk1_complex_phosphorylated)^n_plx)*(Plx1_total - Plx1_active);
end

function function_for_cdk_inactivation_1(Cyclin_B1_Cdk1_complex_phosphorylated, ec50_wee1, k_cdk1_off, n_wee1, p, r)
  r^(1/2)*k_cdk1_off*(1 + p/((Cyclin_B1_Cdk1_complex_phosphorylated/ec50_wee1)^n_wee1 + 1))*Cyclin_B1_Cdk1_complex_phosphorylated;
end

function function_for_cdk1_activation_1(Cyclin_B1_Cdk1_complex_phosphorylated, Cyclin_B1_Cdk1_complex_unphosphorylated, ec50_cdc25, k_cdk1_on, n_cdc25, p, r)
  1/r^(1/2)*k_cdk1_on*(1 + p/(1 + (ec50_cdc25/Cyclin_B1_Cdk1_complex_phosphorylated)^n_cdc25))*Cyclin_B1_Cdk1_complex_unphosphorylated;
end

model Tsai2014___Cell_cycle_duration_control_by_oscillatory_Dynamics__in_Early_Xenopus_laevis_Embryos()
  // Tsai2014 - Cell cycle duration control by oscillatory Dynamics in Early Xenopus laevis Embryos
  // During the early development of Xenopus laevis embryos, the first mitotic cell cycle is long (∼85 min) and the subsequent 11 cycles are short (∼30 min) and clock-like. Here we address the question of how the Cdk1 cell cycle oscillator changes between these two modes of operation. We found that the change can be attributed to an alteration in the balance between Wee1/Myt1 and Cdc25. The change in balance converts a circuit that acts like a positive-plus-negative feedback oscillator, with spikes of Cdk1 activation, to one that acts like a negative-feedback-only oscillator, with a shorter period and smoothly varying Cdk1 activity. Shortening the first cycle, by treating embryos with the Wee1A/Myt1 inhibitor PD0166285, resulted in a dramatic reduction in embryo viability, and restoring the length of the first cycle in inhibitor-treated embryos with low doses of cycloheximide partially rescued viability. Computations with an experimentally parameterized mathematical model show that modest changes in the Wee1/Cdc25 ratio can account for the observed qualitative changes in the cell cycle. The high ratio in the first cycle allows the period to be long and tunable, and decreasing the ratio in the subsequent cycles allows the oscillator to run at a maximal speed. Thus, the embryo rewires its feedback regulation to meet two different developmental requirements during early development.
  // biomodels.db:MODEL1809060006 biomodels.db:BIOMD0000000719
  // hasPart GO:0051726
  // hasProperty mamo:MAMO_0000046
  // hasTaxon taxonomy:8355
  // isDescribedBy doi:10.1371/journal.pbio.1001788
  // isDescribedBy pubmed:24523664

  // Compartments:
  compartment nuclear = 1;  // isVersionOf ncit:C13361

  // Species:
  // cdk1a in the publication
  species Cyclin_B1_Cdk1_complex_phosphorylated in nuclear = 60;  // hasPart uniprot:P13350; hasPart uniprot:P35567; GO:0032991
  // _named cdk1i in the publication
  species Cyclin_B1_Cdk1_complex_unphosphorylated in nuclear = 0;  // hasPart uniprot:P13350; hasPart uniprot:P35567; GO:0032991
  species Plx1_active in nuclear = 0;  // isVersionOf uniprot:P70032; hasProperty PATO:0002354; hasProperty PATO:0002354
  species APC_C_active in nuclear = 1; APC_C_active is "APC/C active";  // hasPart uniprot:Q6GQ63; hasProperty PATO:0002354; hasProperty PATO:0002354
  species $Plx1_total in nuclear = 1;  // isVersionOf uniprot:P70032
  species APC_C_total in nuclear = 1; APC_C_total is "APC/C total";  // hasPart uniprot:Q6GQ63
  species $Cyclin_B1_Cdk1_complex_total in nuclear;  // hasPart uniprot:P35567; hasPart uniprot:P13350; GO:0032991

  // Parameters:
  k_synth = 1.5;
  k_dest = 0.4;
  ec50_cdc25 = 30;
  n_cdc25 = 11;
  ec50_wee1 = 35;
  n_wee1 = 3.5;
  k_cdk1_on = 0.0354;
  k_cdk1_off = 0.0354;
  p = 5;
  ec50_plx = 60;
  ec50_apc = 0.5;
  n_apc = 4;
  n_plx = 5;
  k_plxon = 1.5;
  k_plx_off = 0.125;
  k_apc_on = 1.5;
  k_apc_off = 0.15;
  tau = 4;

  // Assignment rules:
  Cyclin_B1_Cdk1_complex_total := Cyclin_B1_Cdk1_complex_unphosphorylated + Cyclin_B1_Cdk1_complex_phosphorylated;
  r := 1/(2*(1 + 3/(1 + exp((70 - time)/tau)))^2);

  // Reactions:
  Cyclin_B1_Cdk1_phosphorylated_synthesis: => Cyclin_B1_Cdk1_complex_phosphorylated; nuclear*Constant_flux__irreversible(k_synth);  // isVersionOf ncit:C61408
  Cyclin_B1_Cdk1_unphosphorylated_degradation: Cyclin_B1_Cdk1_complex_unphosphorylated => ; nuclear*function_for_cdk1a_degradation_by_apc_1(APC_C_active, Cyclin_B1_Cdk1_complex_unphosphorylated, k_dest);  // modifiers: APC_C_active
  Cyclin_B1_Cdk1_phosphorylated_degradation: Cyclin_B1_Cdk1_complex_phosphorylated => ; nuclear*function_for_cdk1a_degradation_by_apc_2(APC_C_active, Cyclin_B1_Cdk1_complex_phosphorylated, k_dest);  // modifiers: APC_C_active
  Cyclin_B1_Cdk1_phosphorylated_dephosphorylation: Cyclin_B1_Cdk1_complex_phosphorylated => Cyclin_B1_Cdk1_complex_unphosphorylated; nuclear*function_for_cdk_inactivation_1(Cyclin_B1_Cdk1_complex_phosphorylated, ec50_wee1, k_cdk1_off, n_wee1, p, r);  // isVersionOf GO:0016311
  Cyclin_B1_Cdk1_phosphorylated_phosphorylation: Cyclin_B1_Cdk1_complex_unphosphorylated => Cyclin_B1_Cdk1_complex_phosphorylated; nuclear*function_for_cdk1_activation_1(Cyclin_B1_Cdk1_complex_phosphorylated, Cyclin_B1_Cdk1_complex_unphosphorylated, ec50_cdc25, k_cdk1_on, n_cdc25, p, r);  // isVersionOf GO:0016310
  Plx1_activation_by_active_Cdk1: => Plx1_active; nuclear*function_for_plx1_activation_1(Cyclin_B1_Cdk1_complex_phosphorylated, Plx1_active, Plx1_total, ec50_plx, k_plxon, n_plx);  // modifiers: Cyclin_B1_Cdk1_complex_phosphorylated, Plx1_total
  Plx1_inactivation_after_Cdk1_inactivated: Plx1_active => ; nuclear*k_plx_off*Plx1_active;
  Activation_of_APC_CCdc20_by_active_Plx1: => APC_C_active; nuclear*function_for_apc_activation_1(APC_C_active, APC_C_total, Plx1_active, ec50_apc, k_apc_on, n_apc); Activation_of_APC_CCdc20_by_active_Plx1 is "Activation of APC/CCdc20 by active Plx1";  // modifiers: Plx1_active, APC_C_total
  inactivation_of_APC_CCdc20_after_Plx1_is_inactivated: APC_C_active => ; nuclear*k_apc_off*APC_C_active; inactivation_of_APC_CCdc20_after_Plx1_is_inactivated is "inactivation of APC/CCdc20 after Plx1 is inactivated";

  // Unit definitions:
  unit volume = 1e-3 litre;
  unit substance = 1e-3 mole;
end
